// COMSOL Multiphysics 6.4.0.343 model "comsol_built_comsol_2_1_short.mph"
// Outline of the model tree

Parameters
  L = 75.0[um]  // Hydrogel node side length
  xdist = 175.0[um]  // Sender/receiver center distance
  margin = 2375.0[um]  // Bath margin
  Wbath = 2*margin + xdist + L  // Bath width
  Hbath = 2*margin + L  // Bath height
  cy = Hbath/2  // Common node y center
  sender_cx = margin + L/2  // Sender center x
  receiver_cx = sender_cx + xdist  // Receiver center x
  Dgel = 60e-12
  Dsolution = 150e-12
  kp = 0.2
  kd_ds = 3e-4
  kd_ss = 3e-4
  kslow = 1e5
  kfast = 1e6
  I1O2_0 = 1e-07
  I2_0 = 1e-07
  Th2_0 = 9.999999999999999e-06
  t_end = 3.6
  t_step = 1

Variables
  var1 "Variables 1"
    sender_mask = if(abs(x-sender_cx)<=L/2,1,0)*if(abs(y-cy)<=L/2,1,0)
    receiver_mask = if(abs(x-receiver_cx)<=L/2,1,0)*if(abs(y-cy)<=L/2,1,0)
    node_mask = if(sender_mask+receiver_mask>0,1,0)
    D_s2 = if(node_mask>0,Dgel,Dsolution)
    i2_eff = if(receiver_mask>0.5,i2,0)
    th2_eff = if(receiver_mask>0.5,th2,0)

Selections
  sel_sender: Box | entitydim = 2; xmin = sender_cx - L/4; xmax = sender_cx + L/4; ymin = cy - L/4; ymax = cy + L/4
  sel_receiver: Box | entitydim = 2; xmin = receiver_cx - L/4; xmax = receiver_cx + L/4; ymin = cy - L/4; ymax = cy + L/4

Couplings
  intop_recv: Integration on selection sel_receiver

Geometry
  geom1 "Geometry 1" (2D, length unit µm)
    bath: Rectangle | size = {Wbath, Hbath}
    sender: Rectangle | size = {L, L}; base = center; pos = {sender_cx, cy}
    receiver: Rectangle | size = {L, L}; base = center; pos = {receiver_cx, cy}
    co1: Compose | input = bath, sender, receiver; formula = bath+sender+receiver
    fin: Finalize "Form Union"

Physics
  pdes2: CoefficientFormPDE on all domains
    dependent variable s2
    cfeq1: CoefficientFormPDE (default)
      c = {D_s2, 0, 0, D_s2}
      a = 0
      f = kp*I1O2_0*sender_mask - kslow*i2_eff*s2 - kfast*th2_eff*s2 - kd_ss*s2
      ea = 0
      da = 1
    zflx1: ZeroFluxBoundary "Zero Flux 1" (default)
    init1: init "Initial Values 1" (default) | s2 = 0
  dode_i2: DomainODE "Domain ODEs and DAEs 2" on selection sel_receiver
    dependent variable i2
    dode1: DistributedODE (default) | f = kd_ds*s2i2 - kslow*i2*s2; da = 1
    init1: init "Initial Values 1" (default) | i2 = I2_0
  dode_s2i2: DomainODE "Domain ODEs and DAEs 2a" on selection sel_receiver
    dependent variable s2i2
    dode1: DistributedODE (default) | f = -kd_ds*s2i2 + kslow*i2*s2; da = 1
    init1: init "Initial Values 1" (default) | s2i2 = 0
  dode_th2: DomainODE "Domain ODEs and DAEs 2b" on selection sel_receiver
    dependent variable th2
    dode1: DistributedODE (default) | f = kd_ds*s2th2 - kfast*th2*s2; da = 1
    init1: init "Initial Values 1" (default) | th2 = Th2_0
  dode_s2th2: DomainODE "Domain ODEs and DAEs 2c" on selection sel_receiver
    dependent variable s2th2
    dode1: DistributedODE (default) | f = -kd_ds*s2th2 + kfast*th2*s2; da = 1
    init1: init "Initial Values 1" (default) | s2th2 = 0

Mesh
  mesh1 "Mesh 1"
    size: MeshSizeDefault | hmax = 335; hmin = 1.5; hcurve = 0.3; hgrad = 1.3
    ftri1: FreeTri "Free Triangular 1" on remaining entities
      size1: Size on entire geometry

Studies
  std1 "Study 1"
    time: Transient "Time Dependent" | tlist = range(0,t_step,t_end)

Solver configurations
  sol1 "Solution 1" (study std1)
    v1: Variables "Dependent Variables 1"
    t1: Time "Time-Dependent Solver 1"
      dDef: Direct
      fc1: FullyCoupled

Datasets
  dset1: Solution | solution = sol1