// COMSOL Multiphysics 6.4.0.343 model "test_builder_short_solve_units_fixed.mph"
// Outline of the model tree

Parameters
  L = 50.0[um]  // Hydrogel node side length
  xdist = 150.0[um]  // Sender/receiver center distance
  margin = 250.0[um]  // Bath margin
  Wbath = 2*margin + xdist + L  // Bath width
  Hbath = 2*margin + L  // Bath height
  cy = Hbath/2  // Common node y center
  sender_cx = margin + L/2  // Sender center x
  receiver_cx = sender_cx + xdist  // Receiver center x
  Dgel = 60[um^2/s]
  Dsolution = 150[um^2/s]
  kp = 0.2[1/s]
  kd_ds = 3e-4[1/s]
  kd_ss = 3e-4[1/s]
  kslow = 1e5[1/M/s]
  kfast = 1e6[1/M/s]
  I1O2_0 = 100.0[nM]
  I2_0 = 100.0[nM]
  Th2_0 = 5.0[uM]
  t_end = 0.001[h]
  t_step = 1.0[s]

Variables
  var1 "Variables 1"
    sender_mask = if(abs(x-sender_cx)<=L/2,1,0)*if(abs(y-cy)<=L/2,1,0)
    receiver_mask = if(abs(x-receiver_cx)<=L/2,1,0)*if(abs(y-cy)<=L/2,1,0)
    node_mask = if(sender_mask+receiver_mask>0,1,0)
    D_s2 = if(node_mask>0,Dgel,Dsolution)
    I1O2_fixed = I1O2_0*sender_mask
    I2_init = I2_0*receiver_mask
    Th2_init = Th2_0*receiver_mask

Couplings
  intop1: Integration on all domains
  intop2: Integration on all domains

Geometry
  geom1 "Geometry 1" (2D, length unit µm)
    r1: Rectangle | size = {Wbath, Hbath}
    fin: Finalize "Form Union"

Physics
  pdes2: CoefficientFormPDE on all domains
    dependent variable s2
    cfeq1: CoefficientFormPDE (default)
      c = {D_s2, 0, 0, D_s2}
      a = 0
      f = kp*I1O2_fixed - kslow*i2*s2 - kfast*th2*s2 - kd_ss*s2
      ea = 0
      da = 1
    zflx1: ZeroFluxBoundary "Zero Flux 1" (default)
    init1: init "Initial Values 1" (default) | s2 = 0
  pdei2: CoefficientFormPDE "Coefficient Form PDE 2a" on all domains
    dependent variable i2
    cfeq1: CoefficientFormPDE (default) | c = {0, 0, 0, 0}; a = 0; f = kd_ds*s2i2 - kslow*i2*s2; ea = 0; da = 1
    zflx1: ZeroFluxBoundary "Zero Flux 1" (default)
    init1: init "Initial Values 1" (default) | i2 = I2_init
  pdes2i2: CoefficientFormPDE "Coefficient Form PDE 2b" on all domains
    dependent variable s2i2
    cfeq1: CoefficientFormPDE (default) | c = {0, 0, 0, 0}; a = 0; f = -kd_ds*s2i2 + kslow*i2*s2; ea = 0; da = 1
    zflx1: ZeroFluxBoundary "Zero Flux 1" (default)
    init1: init "Initial Values 1" (default) | s2i2 = 0
  pdeth2: CoefficientFormPDE "Coefficient Form PDE 2c" on all domains
    dependent variable th2
    cfeq1: CoefficientFormPDE (default) | c = {0, 0, 0, 0}; a = 0; f = kd_ds*s2th2 - kfast*th2*s2; ea = 0; da = 1
    zflx1: ZeroFluxBoundary "Zero Flux 1" (default)
    init1: init "Initial Values 1" (default) | th2 = Th2_init
  pdes2th2: CoefficientFormPDE "Coefficient Form PDE 2d" on all domains
    dependent variable s2th2
    cfeq1: CoefficientFormPDE (default) | c = {0, 0, 0, 0}; a = 0; f = -kd_ds*s2th2 + kfast*th2*s2; ea = 0; da = 1
    zflx1: ZeroFluxBoundary "Zero Flux 1" (default)
    init1: init "Initial Values 1" (default) | s2th2 = 0

Mesh
  mesh1 "Mesh 1" (physics-controlled)
    size: MeshSizeDefault | hauto = 8

Studies
  std1 "Study 1"
    time: Transient "Time Dependent" | tlist = range(0,t_step,t_end)

Solver configurations
  sol1 "Solution 1" (study std1)
    v1: Variables "Dependent Variables 1"
    t1: Time "Time-Dependent Solver 1"
      dDef: Direct
      fc1: FullyCoupled

Datasets
  dset1: Solution | solution = sol1